AnySeg R1Seg = {

  AnyFolder &Data = ...Data.unscaled.ModelParameters;

  // This file includes the trunk specifc scaling function
  // and anatomical reference system
  #include "TrunkAnatomicalFrame.any"

  TrunkScaleWithInterfaceMorphing Scale(
    GeomScale = ....Scaling.GeometricalScaling.Thorax.ScaleFunction,
    PelvisSeg = ...PelvisSeg,
  ) = {};

  AnyRefNode MoCapMarkerFrameAMMR24 = {}; ///< For backwards compatability with AMMR 2.4 MoCap Marker protocols

  r0=..T1Seg.r0 +
     ..T1Seg._SIDE_.sRel*..T1Seg.Axes0'  +
     ..T1Seg._SIDE_.CTCVJntNode.sRel*..T1Seg._SIDE_.ARel'*..T1Seg.Axes0'-
     CTCVJntNode.sRel*Axes0';

  // Inertia properties for the segment
  UseInertiaObjects = On;
  AnyInertiaSolid BoneInertiaObject = {
    BodyMassCorrection massCorrection() = {
      DensityTheoretical = ..Data.BoneDensity;
      enableMassCorrection = Off;
    };
    AnySurfSTL surface = {
      FileName = ..BoneDraw.FileName;
      AnyFunTransform3D &scale = ..Scale;
      viewSurface.RGB = {0,0,1};
      ScaleXYZ = ..BoneDraw.ScaleXYZ;
    };
  };

  rib_outer_inertia OuterInertiaObject() = {
    rib_index = 1;
  };

  AnyRefNode CT = { sRel = .Scale(.Data.R1._SIDE_.CT_pos); };
  AnyRefNode CC = { sRel = .Scale(.Data.R1._SIDE_.CC_pos); };
  AnyRefNode CV = { sRel = .Scale(.Data.R1._SIDE_.CV_pos); };
  AnyRefNode R1R2IC = { sRel = .Scale(.Data.R1._SIDE_.R1R2IC_pos); };
  AnyRefNode &CTCVJntNode = CV;

  AnyRefNode CTsup = { sRel = .Scale(.Data.R1._SIDE_.CTsup_pos); };
  AnyRefNode CTinf = { sRel = .Scale(.Data.R1._SIDE_.CTinf_pos); };

  AnyDrawSurf BoneDraw = {
    FileName = ....Data.unscaled.STL.FilenameR1Seg;
    RGB = Main.DrawSettings.Colors.Segments;
    ScaleXYZ = {1.0, 1.0, 1.0 * ..Sign};
    Opacity = 0.2;
    AnyFunTransform3D &Scale = .Scale;
  };
}; // End of R1Seg

AnySeg R2Seg = {

  AnyFolder &Data = ...Data.unscaled.ModelParameters;

  // This file includes the trunk specifc scaling function
  // and anatomical reference system
  #include "TrunkAnatomicalFrame.any"

  TrunkScaleWithInterfaceMorphing Scale(
    GeomScale = ....Scaling.GeometricalScaling.Thorax.ScaleFunction,
    PelvisSeg = ...PelvisSeg,
  ) = {};

  AnyRefNode MoCapMarkerFrameAMMR24 = {}; ///< For backwards compatability with AMMR 2.4 MoCap Marker protocols

  r0 = ..T2Seg.r0 +
    ..T2Seg._SIDE_.sRel*..T2Seg.Axes0' +
    ..T2Seg._SIDE_.CTCVJntNode.sRel*..T2Seg._SIDE_.ARel'*..T2Seg.Axes0' -
    CTCVJntNode.sRel*Axes0';

  // Inertia properties for the segment
  UseInertiaObjects = On;
  AnyInertiaSolid BoneInertiaObject = {
    BodyMassCorrection massCorrection() = {
      DensityTheoretical = ..Data.BoneDensity;
      enableMassCorrection = Off;
    };
    AnySurfSTL surface = {
      FileName = ..BoneDraw.FileName;
      AnyFunTransform3D &scale = ..Scale;
      viewSurface.RGB = {0,0,1};
      ScaleXYZ = ..BoneDraw.ScaleXYZ;
    };
  };

  rib_outer_inertia OuterInertiaObject()={
    rib_index = 2;
  };

  AnyRefNode CT = { sRel = .Scale(.Data.R2._SIDE_.CT_pos); };
  AnyRefNode CC = { sRel = .Scale(.Data.R2._SIDE_.CC_pos); };
  AnyRefNode &CTCVJntNode = CV;
  AnyRefNode CV = { sRel = .Scale(.Data.R2._SIDE_.CV_pos);  };
  AnyRefNode R1R2IC = { sRel = .Scale(.Data.R1._SIDE_.R1R2IC_pos); };
  AnyRefNode R2R3IC = { sRel = .Scale(.Data.R2._SIDE_.R2R3IC_pos); };
  AnyRefNode CTsup = { sRel = .Scale(.Data.R2._SIDE_.CTsup_pos); };
  AnyRefNode CTinf = { sRel = .Scale(.Data.R2._SIDE_.CTinf_pos); };

  AnyDrawSurf BoneDraw = {
    FileName = ....Data.unscaled.STL.FilenameR2Seg;
    RGB = Main.DrawSettings.Colors.Segments;
    Opacity= 0.2;
    ScaleXYZ = {1.0, 1.0, 1.0 * ..Sign};
    AnyFunTransform3D &Scale = .Scale;
  };
}; // End of R2Seg

AnySeg R3Seg = {
  AnyFolder &Data = ...Data.unscaled.ModelParameters;

  // This file includes the trunk specifc scaling function
  // and anatomical reference system
  #include "TrunkAnatomicalFrame.any"

  TrunkScaleWithInterfaceMorphing Scale(
    GeomScale = ....Scaling.GeometricalScaling.Thorax.ScaleFunction,
    PelvisSeg = ...PelvisSeg,
  ) = {};

  AnyRefNode MoCapMarkerFrameAMMR24 = {}; ///< For backwards compatability with AMMR 2.4 MoCap Marker protocols

  r0 = ..T3Seg.r0 +
    ..T3Seg._SIDE_.sRel*..T3Seg.Axes0' +
    ..T3Seg._SIDE_.CTCVJntNode.sRel*..T3Seg._SIDE_.ARel'*..T3Seg.Axes0' -
    CTCVJntNode.sRel*Axes0';

  // Inertia properties for the segment
  UseInertiaObjects = On;
  AnyInertiaSolid BoneInertiaObject = {
    BodyMassCorrection massCorrection() = {
      DensityTheoretical = ..Data.BoneDensity;
      enableMassCorrection = Off;
    };
    AnySurfSTL surface = {
      FileName = ..BoneDraw.FileName;
      AnyFunTransform3D &scale = ..Scale;
      viewSurface.RGB = {0,0,1};
      ScaleXYZ = ..BoneDraw.ScaleXYZ;
    };
  };

  rib_outer_inertia OuterInertiaObject()={
    rib_index = 3;
  };

  AnyRefNode CT = { sRel = .Scale(.Data.R3._SIDE_.CT_pos); };
  AnyRefNode CC = { sRel = .Scale(.Data.R3._SIDE_.CC_pos); };
  AnyRefNode &CTCVJntNode = CV;
  AnyRefNode CV = { sRel = .Scale(.Data.R3._SIDE_.CV_pos); };
  AnyRefNode R2R3IC = { sRel = .Scale(.Data.R2._SIDE_.R2R3IC_pos); };
  AnyRefNode R3R4IC = { sRel = .Scale(.Data.R3._SIDE_.R3R4IC_pos); };
  AnyRefNode CTsup = { sRel = .Scale(.Data.R3._SIDE_.CTsup_pos); };
  AnyRefNode CTinf = { sRel = .Scale(.Data.R3._SIDE_.CTinf_pos); };

  AnyDrawSurf BoneDraw = {
    FileName = ....Data.unscaled.STL.FilenameR3Seg;
    RGB = Main.DrawSettings.Colors.Segments;
    ScaleXYZ = {1.0, 1.0, 1.0 * ..Sign};
    Opacity = 0.2;
    AnyFunTransform3D &Scale = .Scale;
  };
}; // End of R3Seg

AnySeg R4Seg = {
  AnyFolder &Data = ...Data.unscaled.ModelParameters;

  // This file includes the trunk specifc scaling function
  // and anatomical reference system
  #include "TrunkAnatomicalFrame.any"

  TrunkScaleWithInterfaceMorphing Scale(
    GeomScale = ....Scaling.GeometricalScaling.Thorax.ScaleFunction,
    PelvisSeg = ...PelvisSeg,
  ) = {};

  AnyRefNode MoCapMarkerFrameAMMR24 = {}; ///< For backwards compatability with AMMR 2.4 MoCap Marker protocols

  r0 = ..T4Seg.r0 +
    ..T4Seg._SIDE_.sRel*..T4Seg.Axes0' +
    ..T4Seg._SIDE_.CTCVJntNode.sRel*..T4Seg._SIDE_.ARel'*..T4Seg.Axes0' -
    CTCVJntNode.sRel*Axes0';

  // Inertia properties for the segment
  UseInertiaObjects = On;
  AnyInertiaSolid BoneInertiaObject = {
    BodyMassCorrection massCorrection() = {
      DensityTheoretical = ..Data.BoneDensity;
      enableMassCorrection = Off;
    };
    AnySurfSTL surface = {
      FileName = ..BoneDraw.FileName;
      AnyFunTransform3D &scale = ..Scale;
      viewSurface.RGB = {0,0,1};
      ScaleXYZ = ..BoneDraw.ScaleXYZ;
    };
  };

  rib_outer_inertia OuterInertiaObject()={
    rib_index = 4;
  };

  AnyRefNode CT = { sRel = .Scale(.Data.R4._SIDE_.CT_pos); };
  AnyRefNode CC = { sRel = .Scale(.Data.R4._SIDE_.CC_pos); };
  AnyRefNode &CTCVJntNode = CV;
  AnyRefNode CV = { sRel = .Scale(.Data.R4._SIDE_.CV_pos); };
  AnyRefNode R3R4IC = { sRel = .Scale(.Data.R3._SIDE_.R3R4IC_pos); };
  AnyRefNode R4R5IC = { sRel = .Scale(.Data.R4._SIDE_.R4R5IC_pos); };
  AnyRefNode CTsup = { sRel = .Scale(.Data.R4._SIDE_.CTsup_pos); };
  AnyRefNode CTinf = { sRel = .Scale(.Data.R4._SIDE_.CTinf_pos); };

  AnyDrawSurf BoneDraw = {
    Opacity = 0.2;
    FileName = ....Data.unscaled.STL.FilenameR4Seg;
    RGB = Main.DrawSettings.Colors.Segments;
    ScaleXYZ = {1.0, 1.0, 1.0 * ..Sign};
    AnyFunTransform3D &Fun = .Scale;
  };
}; // End of R4Seg

AnySeg R5Seg = {
  AnyFolder &Data = ...Data.unscaled.ModelParameters;

  // This file includes the trunk specifc scaling function
  // and anatomical reference system
  #include "TrunkAnatomicalFrame.any"

  TrunkScaleWithInterfaceMorphing Scale(
    GeomScale = ....Scaling.GeometricalScaling.Thorax.ScaleFunction,
    PelvisSeg = ...PelvisSeg,
  ) = {};

  AnyRefNode MoCapMarkerFrameAMMR24 = {}; ///< For backwards compatability with AMMR 2.4 MoCap Marker protocols

  r0 = ..T5Seg.r0 +
    ..T5Seg._SIDE_.sRel*..T5Seg.Axes0' +
    ..T5Seg._SIDE_.CTCVJntNode.sRel*..T5Seg._SIDE_.ARel'*..T5Seg.Axes0' -
    CTCVJntNode.sRel*Axes0';

  // Inertia properties for the segment
  UseInertiaObjects = On;
  AnyInertiaSolid BoneInertiaObject = {
    BodyMassCorrection massCorrection() = {
      DensityTheoretical = ..Data.BoneDensity;
      enableMassCorrection = Off;
    };
    AnySurfSTL surface = {
      FileName = ..BoneDraw.FileName;
      AnyFunTransform3D &scale = ..Scale;
      viewSurface.RGB = {0,0,1};
      ScaleXYZ = ..BoneDraw.ScaleXYZ;
    };
  };

  rib_outer_inertia OuterInertiaObject()={
    rib_index = 5;
  };

  AnyRefNode CT = { sRel = .Scale(.Data.R5._SIDE_.CT_pos); };
  AnyRefNode CC = { sRel = .Scale(.Data.R5._SIDE_.CC_pos); };
  AnyRefNode &CTCVJntNode = CV;
  AnyRefNode CV = { sRel = .Scale(.Data.R5._SIDE_.CV_pos); };
  AnyRefNode R4R5IC = { sRel = .Scale(.Data.R4._SIDE_.R4R5IC_pos); };
  AnyRefNode R5R6IC = { sRel = .Scale(.Data.R5._SIDE_.R5R6IC_pos); };
  AnyRefNode CTsup = { sRel = .Scale(.Data.R5._SIDE_.CTsup_pos); };
  AnyRefNode CTinf = { sRel = .Scale(.Data.R5._SIDE_.CTinf_pos); };

  AnyDrawSurf BoneDraw = {
    Opacity = 0.2;
    FileName = ....Data.unscaled.STL.FilenameR5Seg;
    RGB = Main.DrawSettings.Colors.Segments;
    ScaleXYZ = {1.0, 1.0, 1.0 * ..Sign};
    AnyFunTransform3D &Fun = .Scale;
  };
}; // End of R5Seg

AnySeg R6Seg = {
  AnyFolder &Data = ...Data.unscaled.ModelParameters;

  // This file includes the trunk specifc scaling function
  // and anatomical reference system
  #include "TrunkAnatomicalFrame.any"

  TrunkScaleWithInterfaceMorphing Scale(
    GeomScale = ....Scaling.GeometricalScaling.Thorax.ScaleFunction,
    PelvisSeg = ...PelvisSeg,
  ) = {};

  AnyRefNode MoCapMarkerFrameAMMR24 = {}; ///< For backwards compatability with AMMR 2.4 MoCap Marker protocols

  r0 = ..T6Seg.r0 +
    ..T6Seg._SIDE_.sRel*..T6Seg.Axes0' +
    ..T6Seg._SIDE_.CTCVJntNode.sRel*..T6Seg._SIDE_.ARel'*..T6Seg.Axes0' -
    CTCVJntNode.sRel*Axes0';

  // Inertia properties for the segment
  UseInertiaObjects = On;
  AnyInertiaSolid BoneInertiaObject = {
    BodyMassCorrection massCorrection() = {
      DensityTheoretical = ..Data.BoneDensity;
      enableMassCorrection = Off;
    };
    AnySurfSTL surface = {
      FileName = ..BoneDraw.FileName;
      AnyFunTransform3D &scale = ..Scale;
      viewSurface.RGB = {0,0,1};
      ScaleXYZ = ..BoneDraw.ScaleXYZ;
    };
  };

  rib_outer_inertia OuterInertiaObject()={
    rib_index = 6;
  };

  AnyRefNode CT = { sRel = .Scale(.Data.R6._SIDE_.CT_pos); };
  AnyRefNode CC = { sRel = .Scale(.Data.R6._SIDE_.CC_pos); };
  AnyRefNode &CTCVJntNode = CV;
  AnyRefNode CV = { sRel = .Scale(.Data.R6._SIDE_.CV_pos); };
  AnyRefNode R5R6IC = { sRel = .Scale(.Data.R5._SIDE_.R5R6IC_pos); };
  AnyRefNode R6R7IC = { sRel = .Scale(.Data.R6._SIDE_.R6R7IC_pos); };
  AnyRefNode CTsup = { sRel = .Scale(.Data.R6._SIDE_.CTsup_pos); };
  AnyRefNode CTinf = { sRel = .Scale(.Data.R6._SIDE_.CTinf_pos); };

  AnyDrawSurf BoneDraw = {
    Opacity = 0.2;
    FileName = ....Data.unscaled.STL.FilenameR6Seg;
    RGB = Main.DrawSettings.Colors.Segments;
    ScaleXYZ = {1.0, 1.0, 1.0 * ..Sign};
    AnyFunTransform3D &Fun = .Scale;
  };
}; // End of R6Seg

AnySeg R7Seg = {
  AnyFolder &Data = ...Data.unscaled.ModelParameters;

  // This file includes the trunk specifc scaling function
  // and anatomical reference system
  #include "TrunkAnatomicalFrame.any"

  TrunkScaleWithInterfaceMorphing Scale(
    GeomScale = ....Scaling.GeometricalScaling.Thorax.ScaleFunction,
    PelvisSeg = ...PelvisSeg,
  ) = {};

  AnyRefNode MoCapMarkerFrameAMMR24 = {}; ///< For backwards compatability with AMMR 2.4 MoCap Marker protocols

  r0 = ..T7Seg.r0 +
    ..T7Seg._SIDE_.sRel*..T7Seg.Axes0' +
    ..T7Seg._SIDE_.CTCVJntNode.sRel*..T7Seg._SIDE_.ARel'*..T7Seg.Axes0' -
    CTCVJntNode.sRel*Axes0';

  // Inertia properties for the segment
  UseInertiaObjects = On;
  AnyInertiaSolid BoneInertiaObject = {
    BodyMassCorrection massCorrection() = {
      DensityTheoretical = ..Data.BoneDensity;
      enableMassCorrection = Off;
    };
    AnySurfSTL surface = {
      FileName = ..BoneDraw.FileName;
      AnyFunTransform3D &scale = ..Scale;
      viewSurface.RGB = {0,0,1};
      ScaleXYZ = ..BoneDraw.ScaleXYZ;
    };
  };

  rib_outer_inertia OuterInertiaObject()={
    rib_index = 7;
  };

  AnyRefNode CT = { sRel = .Scale(.Data.R7._SIDE_.CT_pos); };
  AnyRefNode CC = { sRel = .Scale(.Data.R7._SIDE_.CC_pos); };
  AnyRefNode &CTCVJntNode = CV;
  AnyRefNode CV = { sRel = .Scale(.Data.R7._SIDE_.CV_pos); };
  AnyRefNode R6R7IC = { sRel = .Scale(.Data.R6._SIDE_.R6R7IC_pos); };
  AnyRefNode R7R8IC = { sRel = .Scale(.Data.R7._SIDE_.R7R8IC_pos); };
  AnyRefNode CTsup = { sRel = .Scale(.Data.R7._SIDE_.CTsup_pos); };
  AnyRefNode CTinf = { sRel = .Scale(.Data.R7._SIDE_.CTinf_pos); };

  AnyDrawSurf BoneDraw = {
    Opacity = 0.2;
    FileName = ....Data.unscaled.STL.FilenameR7Seg;
    RGB = Main.DrawSettings.Colors.Segments;
    ScaleXYZ = {1.0, 1.0, 1.0 * ..Sign};
    AnyFunTransform3D &Fun = .Scale;
  };
}; // End of R7Seg

AnySeg R8Seg = {
  AnyFolder &Data = ...Data.unscaled.ModelParameters;

  // This file includes the trunk specifc scaling function
  // and anatomical reference system
  #include "TrunkAnatomicalFrame.any"

  TrunkScaleWithInterfaceMorphing Scale(
    GeomScale = ....Scaling.GeometricalScaling.Thorax.ScaleFunction,
    PelvisSeg = ...PelvisSeg,
  ) = {};

  AnyRefNode MoCapMarkerFrameAMMR24 = {}; ///< For backwards compatability with AMMR 2.4 MoCap Marker protocols

  r0 = ..T8Seg.r0 +
    ..T8Seg._SIDE_.sRel*..T8Seg.Axes0' +
    ..T8Seg._SIDE_.CTCVJntNode.sRel*..T8Seg._SIDE_.ARel'*..T8Seg.Axes0' -
    CTCVJntNode.sRel*Axes0';

  // Inertia properties for the segment
  UseInertiaObjects = On;
  AnyInertiaSolid BoneInertiaObject = {
    BodyMassCorrection massCorrection() = {
      DensityTheoretical = ..Data.BoneDensity;
      enableMassCorrection = Off;
    };
    AnySurfSTL surface = {
      FileName = ..BoneDraw.FileName;
      AnyFunTransform3D &scale = ..Scale;
      viewSurface.RGB = {0,0,1};
      ScaleXYZ = ..BoneDraw.ScaleXYZ;
    };
  };

  rib_outer_inertia OuterInertiaObject()={
    rib_index = 8;
  };

  AnyRefNode CT = { sRel = .Scale(.Data.R8._SIDE_.CT_pos); };
  AnyRefNode CC = { sRel = .Scale(.Data.R8._SIDE_.CC_pos); };
  AnyRefNode &CTCVJntNode = CV;
  AnyRefNode CV = { sRel =  .Scale(.Data.R8._SIDE_.CV_pos); };
  AnyRefNode R7R8IC = { sRel = .Scale(.Data.R7._SIDE_.R7R8IC_pos); };
  AnyRefNode R8R9IC = { sRel = .Scale(.Data.R8._SIDE_.R8R9IC_pos); };
  AnyRefNode CTsup = { sRel = .Scale(.Data.R8._SIDE_.CTsup_pos); };
  AnyRefNode CTinf = { sRel = .Scale(.Data.R8._SIDE_.CTinf_pos); };

  AnyDrawSurf BoneDraw = {
    Opacity = 0.2;
    FileName = ....Data.unscaled.STL.FilenameR8Seg;
    RGB = Main.DrawSettings.Colors.Segments;
    ScaleXYZ = {1.0, 1.0, 1.0 * ..Sign};
    AnyFunTransform3D &Fun = .Scale;
  };
}; // End of R8Seg

AnySeg R9Seg = {
  AnyFolder &Data = ...Data.unscaled.ModelParameters;

  // This file includes the trunk specifc scaling function
  // and anatomical reference system
  #include "TrunkAnatomicalFrame.any"

  TrunkScaleWithInterfaceMorphing Scale(
    GeomScale = ....Scaling.GeometricalScaling.Thorax.ScaleFunction,
    PelvisSeg = ...PelvisSeg,
  ) = {};

  AnyRefNode MoCapMarkerFrameAMMR24 = {}; ///< For backwards compatability with AMMR 2.4 MoCap Marker protocols

  r0 = ..T9Seg.r0 +
    ..T9Seg._SIDE_.sRel*..T9Seg.Axes0' +
    ..T9Seg._SIDE_.CTCVJntNode.sRel*..T9Seg._SIDE_.ARel'*..T9Seg.Axes0' -
    CTCVJntNode.sRel*Axes0';

  // Inertia properties for the segment
  UseInertiaObjects = On;
  AnyInertiaSolid BoneInertiaObject = {
    BodyMassCorrection massCorrection() = {
      DensityTheoretical = ..Data.BoneDensity;
      enableMassCorrection = Off;
    };
    AnySurfSTL surface = {
      FileName = ..BoneDraw.FileName;
      AnyFunTransform3D &scale = ..Scale;
      viewSurface.RGB = {0,0,1};
      ScaleXYZ = ..BoneDraw.ScaleXYZ;
    };
  };

  rib_outer_inertia OuterInertiaObject()={
    rib_index = 9;
  };

  AnyRefNode CT = { sRel = .Scale(.Data.R9._SIDE_.CT_pos); };
  AnyRefNode CC = { sRel = .Scale(.Data.R9._SIDE_.CC_pos); };
  AnyRefNode &CTCVJntNode = CV;
  AnyRefNode CV = { sRel =  .Scale(.Data.R9._SIDE_.CV_pos); };
  AnyRefNode R8R9IC = { sRel = .Scale(.Data.R8._SIDE_.R8R9IC_pos); };
  AnyRefNode R9R10IC ={ sRel = .Scale(.Data.R9._SIDE_.R9R10IC_pos); };
  AnyRefNode CTsup = { sRel = .Scale(.Data.R9._SIDE_.CTsup_pos); };
  AnyRefNode CTinf = { sRel = .Scale(.Data.R9._SIDE_.CTinf_pos); };

  AnyDrawSurf BoneDraw = {
    Opacity = 0.2;
    FileName = ....Data.unscaled.STL.FilenameR9Seg;
    RGB = Main.DrawSettings.Colors.Segments;
    ScaleXYZ = {1.0, 1.0, 1.0 * ..Sign};
    AnyFunTransform3D &Fun = .Scale;
  };
}; // End of R9Seg

AnySeg R10Seg = {
  AnyFolder &Data = ...Data.unscaled.ModelParameters;

  // This file includes the trunk specifc scaling function
  // and anatomical reference system
  #include "TrunkAnatomicalFrame.any"

  TrunkScaleWithInterfaceMorphing Scale(
    GeomScale = ....Scaling.GeometricalScaling.Thorax.ScaleFunction,
    PelvisSeg = ...PelvisSeg,
  ) = {};

  AnyRefNode MoCapMarkerFrameAMMR24 = {}; ///< For backwards compatability with AMMR 2.4 MoCap Marker protocols

  r0 = ..T10Seg.r0 +
    ..T10Seg._SIDE_.sRel*..T10Seg.Axes0' + ..T10Seg._SIDE_.CTCVJntNode.sRel*..T10Seg._SIDE_.ARel'*..T10Seg.Axes0' -
    CTCVJntNode.sRel*Axes0';

  // Inertia properties for the segment
  UseInertiaObjects = On;
  AnyInertiaSolid BoneInertiaObject = {
    BodyMassCorrection massCorrection() = {
      DensityTheoretical = ..Data.BoneDensity;
      enableMassCorrection = Off;
    };
    AnySurfSTL surface = {
      FileName = ..BoneDraw.FileName;
      AnyFunTransform3D &scale = ..Scale;
      viewSurface.RGB = {0,0,1};
      ScaleXYZ = ..BoneDraw.ScaleXYZ;
    };
  };

  rib_outer_inertia OuterInertiaObject()={
    rib_index = 10;
  };

  AnyRefNode CT = { sRel = .Scale(.Data.R10._SIDE_.CT_pos); };
  AnyRefNode CC = { sRel = .Scale(.Data.R10._SIDE_.CC_pos); };
  AnyRefNode &CTCVJntNode = CV;
  AnyRefNode CV = { sRel = .Scale(.Data.R10._SIDE_.CV_pos); };
  AnyRefNode R9R10IC = { sRel = .Scale(.Data.R9._SIDE_.R9R10IC_pos); };
  AnyRefNode CTsup = { sRel = .Scale(.Data.R10._SIDE_.CTsup_pos); };
  AnyRefNode CTinf = { sRel = .Scale(.Data.R10._SIDE_.CTinf_pos); };

  AnyDrawSurf BoneDraw = {
    Opacity = 0.2;
    FileName = ....Data.unscaled.STL.FilenameR10Seg;
    RGB = Main.DrawSettings.Colors.Segments;
    ScaleXYZ = {1.0, 1.0, 1.0 * ..Sign};
    AnyFunTransform3D &Fun = .Scale;
  };
}; // End of R10Seg

AnySeg R11Seg = {
  AnyFolder &Data = ...Data.unscaled.ModelParameters;

  // This file includes the trunk specifc scaling function
  // and anatomical reference system
  #include "TrunkAnatomicalFrame.any"

  TrunkScaleWithInterfaceMorphing Scale(
    GeomScale = ....Scaling.GeometricalScaling.Thorax.ScaleFunction,
    PelvisSeg = ...PelvisSeg,
  ) = {};

  AnyRefNode MoCapMarkerFrameAMMR24 = {}; ///< For backwards compatability with AMMR 2.4 MoCap Marker protocols

  r0 = ..T11Seg.r0;

  // Inertia properties for the segment
  UseInertiaObjects = On;
  AnyInertiaSolid BoneInertiaObject = {
    BodyMassCorrection massCorrection() = {
      DensityTheoretical = ..Data.BoneDensity;
      enableMassCorrection = Off;
    };
    AnySurfSTL surface = {
      FileName = ..BoneDraw.FileName;
      AnyFunTransform3D &scale = ..Scale;
      viewSurface.RGB = {0,0,1};
      ScaleXYZ = ..BoneDraw.ScaleXYZ;
    };
  };

  rib_outer_inertia OuterInertiaObject()={
    rib_index = 11;
  };

  AnyRefNode CV = { sRel = .Scale(.Data.R11._SIDE_.CV_pos); };
  AnyRefNode CT = { sRel = .Scale(.Data.R11._SIDE_.CT_pos); };
  /// Rib 11 is free floating without a CC joint
  AnyRefNode CC = { sRel = .ObliquusExternusNode.sRel; };
  AnyRefNode &CTCVJntNode = CV;
  AnyRefNode CTsup = { sRel = .Scale(.Data.R11._SIDE_.CTsup_pos); };
  AnyRefNode CTinf = { sRel = .Scale(.Data.R11._SIDE_.CTinf_pos); };

  AnyDrawSurf BoneDraw = {
    Opacity = 0.2;
    FileName = ....Data.unscaled.STL.FilenameR11Seg;
    RGB = Main.DrawSettings.Colors.Segments;
    ScaleXYZ = {1.0, 1.0, 1.0 * ..Sign};
    AnyFunTransform3D &Fun = .Scale;
  };
}; // End of R11Seg

AnySeg R12Seg = {
  AnyFolder &Data = ...Data.unscaled.ModelParameters;

  // This file includes the trunk specifc scaling function
  // and anatomical reference system
  #include "TrunkAnatomicalFrame.any"

  TrunkScaleWithInterfaceMorphing Scale(
    GeomScale = ....Scaling.GeometricalScaling.Thorax.ScaleFunction,
    PelvisSeg = ...PelvisSeg,
  ) = {};

  AnyRefNode MoCapMarkerFrameAMMR24 = {}; ///< For backwards compatability with AMMR 2.4 MoCap Marker protocols

  r0 = ..T12Seg.r0;

  // Inertia properties for the segment
  UseInertiaObjects = On;
  AnyInertiaSolid BoneInertiaObject = {
    BodyMassCorrection massCorrection() = {
      DensityTheoretical = ..Data.BoneDensity;
      enableMassCorrection = Off;
    };
    AnySurfSTL surface = {
      FileName = ..BoneDraw.FileName;
      AnyFunTransform3D &scale = ..Scale;
      viewSurface.RGB = {0,0,1};
      ScaleXYZ = ..BoneDraw.ScaleXYZ;
    };
  };

  rib_outer_inertia OuterInertiaObject()={
    rib_index = 12;
  };

  AnyRefNode CV = { sRel = .Scale(.Data.R12._SIDE_.CV_pos); };
  AnyRefNode CT = { sRel = .Scale(.Data.R12._SIDE_.CT_pos); };
  /// Rib 12 is free floating without a CC joint
  AnyRefNode CC = { sRel = .ObliquusExternusNode.sRel; };
  AnyRefNode &CTCVJntNode = CV;
  AnyRefNode CTsup         = { sRel =  .Scale(.Data.R12._SIDE_.CTsup_pos);};
  AnyRefNode CTinf         = { sRel =  .Scale(.Data.R12._SIDE_.CTinf_pos);};

  AnyDrawSurf BoneDraw =
  {
    Opacity = 0.2;
    FileName = ....Data.unscaled.STL.FilenameR12Seg;
    RGB = Main.DrawSettings.Colors.Segments;
    ScaleXYZ = {1.0, 1.0, 1.0 * ..Sign};
    AnyFunTransform3D &Fun = .Scale;
  };
}; // End of R12Seg
