Main.HumanModel.BodyModel.Trunk.Segments.T1Seg = {

   // anterior longitudinal
    AnyRefNode ALLNodeInferior = {sRel = .Scale({0.020,0.440,0});};
    AnyRefNode ALLNodeSuperior = {sRel = .Scale({0.024,0.454,0});};
//    // posterior longitudinal
//    AnyRefNode PLLViaNode = {sRel = .Scale({0.037,0.015,0});};
//
    AnyRefNode PLLNodeSuperior = {sRel = .Scale( {0.004, 0.463, 0});};
    AnyRefNode PLLNodeInferior = {sRel = .Scale({-0.002,0.449,0});};
//    // inter/supraspinous
    AnyRefNode InterspinousInferior = {sRel = .Scale({-0.025,0.442,0});};
    AnyRefNode InterspinousSuperior = {sRel = .Scale({-0.024,0.453,0});};
    AnyRefNode SupraspinousInferior = {sRel = .Scale({-0.036,0.435,0});};
    AnyRefNode SupraspinousSuperior = {sRel = .Scale({-0.036,0.443,0});};
//    // ligamenta flavia (right/left)
    AnyRefNode FlavumInferiorR = {sRel = .Scale({-0.013,0.448,0.0065});};
    AnyRefNode FlavumSuperiorR = {sRel = .Scale({-0.006,0.460,0.005});};
    AnyRefNode FlavumInferiorL = {sRel = {.FlavumInferiorR.sRel[0], .FlavumInferiorR.sRel[1], .FlavumInferiorR.sRel[2]*-1};};
    AnyRefNode FlavumSuperiorL = {sRel = {.FlavumSuperiorR.sRel[0], .FlavumSuperiorR.sRel[1], .FlavumSuperiorR.sRel[2]*-1};};

    AnyRefNode InterTransverseR = {sRel = .Scale({-0.020, 0.474, 0.035});};
    AnyRefNode InterTransverseL = {sRel = {.InterTransverseR.sRel[0], .InterTransverseR.sRel[1], .InterTransverseR.sRel[2]*-1};};

    AnyRefNode InterTransverseRmid = {sRel = .Scale({-0.012, 0.465, 0.022});};
    AnyRefNode InterTransverseLmid = {sRel = {.InterTransverseRmid.sRel[0], .InterTransverseRmid.sRel[1], .InterTransverseRmid.sRel[2]*-1};};


  AnyDrawSphere Draw_ALLNodeInferior =
  { //RGB = {0.8, 0.2, 0.2};
    ScaleXYZ = {0.002, 0.002, 0.002};
    Position = .ALLNodeInferior.sRel;
    //GlobalCoord = Off;
  };

  AnyDrawSphere Draw_ALLNodeSuperior =
  { //RGB = {0.8, 0.2, 0.2};
    ScaleXYZ = {0.002, 0.002, 0.002};
    Position = .ALLNodeSuperior.sRel;
    //GlobalCoord = Off;
  };

   AnyDrawSphere Draw_PLLNodeSuper =
  { //RGB = {0.8, 0.2, 0.2};
    ScaleXYZ = {0.002, 0.002, 0.002};
    Position = .PLLNodeSuperior.sRel;
    //GlobalCoord = Off;
  };

  AnyDrawSphere Draw_PLLNodeInferior =
  { //RGB = {0.8, 0.2, 0.2};
    ScaleXYZ = {0.002, 0.002, 0.002};
    Position = .PLLNodeInferior.sRel;
    //GlobalCoord = Off;
  };


  };

Main.HumanModel.BodyModel.Trunk.Segments.T2Seg = {

   // anterior longitudinal
    AnyRefNode ALLNodeInferior = {sRel = .Scale({0.014,0.419,0});};
    AnyRefNode ALLNodeSuperior = {sRel = .Scale({0.018,0.434,0});};
//    // posterior longitudinal
//    AnyRefNode PLLViaNode = {sRel = .Scale({0.037,0.015,0});};
//
    AnyRefNode PLLNodeSuperior = {sRel = .Scale( {-0.004, 0.443, 0});};
    AnyRefNode PLLNodeInferior = {sRel = .Scale({-0.009,0.427,0});};
//    // inter/supraspinous
    AnyRefNode InterspinousInferior = {sRel = .Scale({-0.032,0.422,0});};
    AnyRefNode InterspinousSuperior = {sRel = .Scale({-0.031,0.433,0});};
    AnyRefNode SupraspinousInferior = {sRel = .Scale({-0.043,0.415,0});};
    AnyRefNode SupraspinousSuperior = {sRel = .Scale({-0.043,0.423,0});};
//    // ligamenta flavia (right/left)
    AnyRefNode FlavumInferiorR = {sRel = .Scale({-0.019,0.427,0.0065});};
    AnyRefNode FlavumSuperiorR = {sRel = .Scale({-0.013,0.438,0.005});};
    AnyRefNode FlavumInferiorL = {sRel = {.FlavumInferiorR.sRel[0], .FlavumInferiorR.sRel[1], .FlavumInferiorR.sRel[2]*-1};};
    AnyRefNode FlavumSuperiorL = {sRel = {.FlavumSuperiorR.sRel[0], .FlavumSuperiorR.sRel[1], .FlavumSuperiorR.sRel[2]*-1};};

    AnyRefNode InterTransverseR = {sRel = .Scale({-0.024, 0.450, 0.028});};
    AnyRefNode InterTransverseL = {sRel = {.InterTransverseR.sRel[0], .InterTransverseR.sRel[1], .InterTransverseR.sRel[2]*-1};};

    AnyRefNode InterTransverseRmid = {sRel = .Scale({-0.017, 0.444, 0.020});};
    AnyRefNode InterTransverseLmid = {sRel = {.InterTransverseRmid.sRel[0], .InterTransverseRmid.sRel[1], .InterTransverseRmid.sRel[2]*-1};};
  };

  Main.HumanModel.BodyModel.Trunk.Segments.T3Seg = {

   // anterior longitudinal
    AnyRefNode ALLNodeInferior = {sRel = .Scale({0.009,0.397,0});};
    AnyRefNode ALLNodeSuperior = {sRel = .Scale({0.013,0.412,0});};
//    // posterior longitudinal
//    AnyRefNode PLLViaNode = {sRel = .Scale({0.037,0.015,0});};
//
    AnyRefNode PLLNodeSuperior = {sRel = .Scale( {-0.011, 0.420, 0});};
    AnyRefNode PLLNodeInferior = {sRel = .Scale({-0.016,0.404,0});};
//    // inter/supraspinous
    AnyRefNode InterspinousInferior = {sRel = .Scale({-0.042,0.398,0});};
    AnyRefNode InterspinousSuperior = {sRel = .Scale({-0.039,0.411,0});};
    AnyRefNode SupraspinousInferior = {sRel = .Scale({-0.053,0.390,0});};
    AnyRefNode SupraspinousSuperior = {sRel = .Scale({-0.051,0.398,0});};
//    // ligamenta flavia (right/left)
    AnyRefNode FlavumInferiorR = {sRel = .Scale({-0.026,0.405,0.0065});};
    AnyRefNode FlavumSuperiorR = {sRel = .Scale({-0.022,0.416,0.005});};
    AnyRefNode FlavumInferiorL = {sRel = {.FlavumInferiorR.sRel[0], .FlavumInferiorR.sRel[1], .FlavumInferiorR.sRel[2]*-1};};
    AnyRefNode FlavumSuperiorL = {sRel = {.FlavumSuperiorR.sRel[0], .FlavumSuperiorR.sRel[1], .FlavumSuperiorR.sRel[2]*-1};};

    AnyRefNode InterTransverseR = {sRel = .Scale({-0.034, 0.426, 0.031});};
    AnyRefNode InterTransverseL = {sRel = {.InterTransverseR.sRel[0], .InterTransverseR.sRel[1], .InterTransverseR.sRel[2]*-1};};

    AnyRefNode InterTransverseRmid = {sRel = .Scale({-0.027, 0.419, 0.021});};
    AnyRefNode InterTransverseLmid = {sRel = {.InterTransverseRmid.sRel[0], .InterTransverseRmid.sRel[1], .InterTransverseRmid.sRel[2]*-1};};
  };

  Main.HumanModel.BodyModel.Trunk.Segments.T4Seg = {

   // anterior longitudinal
    AnyRefNode ALLNodeInferior = {sRel = .Scale({0.004,0.373,0});};
    AnyRefNode ALLNodeSuperior = {sRel = .Scale({0.007,0.390,0});};
//    // posterior longitudinal
//    AnyRefNode PLLViaNode = {sRel = .Scale({0.037+.dT4x,0.015+.dT4y,0});};

    AnyRefNode PLLNodeSuperior = {sRel = .Scale( {-0.017, 0.397, 0});};
    AnyRefNode PLLNodeInferior = {sRel = .Scale({-0.022,0.380,0});};
//    // inter/supraspinous
    AnyRefNode InterspinousInferior = {sRel = .Scale({-0.051,0.369,0});};
    AnyRefNode InterspinousSuperior = {sRel = .Scale({-0.048,0.383,0});};
    AnyRefNode SupraspinousInferior = {sRel = .Scale({-0.061,0.362,0});};
    AnyRefNode SupraspinousSuperior = {sRel = .Scale({-0.060,0.371,0});};
//    // ligamenta flavia (right/left)
    AnyRefNode FlavumInferiorR = {sRel = .Scale({-0.033,0.380,0.0065});};
    AnyRefNode FlavumSuperiorR = {sRel = .Scale({-0.030,0.392,0.005});};
    AnyRefNode FlavumInferiorL = {sRel = {.FlavumInferiorR.sRel[0], .FlavumInferiorR.sRel[1], .FlavumInferiorR.sRel[2]*-1};};
    AnyRefNode FlavumSuperiorL = {sRel = {.FlavumSuperiorR.sRel[0], .FlavumSuperiorR.sRel[1], .FlavumSuperiorR.sRel[2]*-1};};
//
    AnyRefNode InterTransverseR = {sRel = .Scale({-0.043, 0.402, 0.032});};
    AnyRefNode InterTransverseL = {sRel = {.InterTransverseR.sRel[0], .InterTransverseR.sRel[1], .InterTransverseR.sRel[2]*-1};};

    AnyRefNode InterTransverseRmid = {sRel = .Scale({-0.034, 0.395, 0.021});};
    AnyRefNode InterTransverseLmid = {sRel = {.InterTransverseRmid.sRel[0], .InterTransverseRmid.sRel[1], .InterTransverseRmid.sRel[2]*-1};};
  };

  Main.HumanModel.BodyModel.Trunk.Segments.T5Seg = {

   // anterior longitudinal
    AnyRefNode ALLNodeInferior = {sRel = .Scale({0.001,0.349,0});};
    AnyRefNode ALLNodeSuperior = {sRel = .Scale({0.003,0.367,0});};
//    // posterior longitudinal
//    AnyRefNode PLLViaNode = {sRel = .Scale({0.037+.dT5x,0.015+.dT5y,0});};
//
    AnyRefNode PLLNodeSuperior = {sRel = .Scale( {-0.024, 0.372, 0});};
    AnyRefNode PLLNodeInferior = {sRel = .Scale({-0.026,0.354,0});};
//    // inter/supraspinous
    AnyRefNode InterspinousInferior = {sRel = .Scale({-0.056,0.343,0});};
    AnyRefNode InterspinousSuperior = {sRel = .Scale({-0.055,0.356,0});};
    AnyRefNode SupraspinousInferior = {sRel = .Scale({-0.067,0.336,0});};
    AnyRefNode SupraspinousSuperior = {sRel = .Scale({-0.066,0.345,0});};
//    // ligamenta flavia (right/left)
    AnyRefNode FlavumInferiorR = {sRel = .Scale({-0.035,0.356,0.0065});};
    AnyRefNode FlavumSuperiorR = {sRel = .Scale({-0.033,0.365,0.005});};
    AnyRefNode FlavumInferiorL = {sRel = {.FlavumInferiorR.sRel[0], .FlavumInferiorR.sRel[1], .FlavumInferiorR.sRel[2]*-1};};
    AnyRefNode FlavumSuperiorL = {sRel = {.FlavumSuperiorR.sRel[0], .FlavumSuperiorR.sRel[1], .FlavumSuperiorR.sRel[2]*-1};};

    AnyRefNode InterTransverseR = {sRel = .Scale({-0.047, 0.375, 0.030});};
    AnyRefNode InterTransverseL = {sRel = {.InterTransverseR.sRel[0], .InterTransverseR.sRel[1], .InterTransverseR.sRel[2]*-1};};

    AnyRefNode InterTransverseRmid = {sRel = .Scale({-0.039, 0.370, 0.021});};
    AnyRefNode InterTransverseLmid = {sRel = {.InterTransverseRmid.sRel[0], .InterTransverseRmid.sRel[1], .InterTransverseRmid.sRel[2]*-1};};
  };

 Main.HumanModel.BodyModel.Trunk.Segments.T6Seg = {

   // anterior longitudinal
    AnyRefNode ALLNodeInferior = {sRel = .Scale({0.000,0.326,0});};
    AnyRefNode ALLNodeSuperior = {sRel = .Scale({0.001,0.343,0});};
//    // posterior longitudinal
//    AnyRefNode PLLViaNode = {sRel = .Scale({0.037+.dT6x,0.015+.dT6y,0});};
//
    AnyRefNode PLLNodeSuperior = {sRel = .Scale( {-0.027, 0.345, 0});};
    AnyRefNode PLLNodeInferior = {sRel = .Scale({-0.0295,0.328,0});};
//    // inter/supraspinous
    AnyRefNode InterspinousInferior = {sRel = .Scale({-0.057,0.315,0});};
    AnyRefNode InterspinousSuperior = {sRel = .Scale({-0.057,0.328,0});};
    AnyRefNode SupraspinousInferior = {sRel = .Scale({-0.068,0.306,0});};
    AnyRefNode SupraspinousSuperior = {sRel = .Scale({-0.067,0.317,0});};
//    // ligamenta flavia (right/left)
    AnyRefNode FlavumInferiorR = {sRel = .Scale({-0.040,0.328,0.0065});};
    AnyRefNode FlavumSuperiorR = {sRel = .Scale({-0.038,0.338,0.005});};
    AnyRefNode FlavumInferiorL = {sRel = {.FlavumInferiorR.sRel[0], .FlavumInferiorR.sRel[1], .FlavumInferiorR.sRel[2]*-1};};
    AnyRefNode FlavumSuperiorL = {sRel = {.FlavumSuperiorR.sRel[0], .FlavumSuperiorR.sRel[1], .FlavumSuperiorR.sRel[2]*-1};};

    AnyRefNode InterTransverseR = {sRel = .Scale({-0.055, 0.347, 0.030});};
    AnyRefNode InterTransverseL = {sRel = {.InterTransverseR.sRel[0], .InterTransverseR.sRel[1], .InterTransverseR.sRel[2]*-1};};

    AnyRefNode InterTransverseRmid = {sRel = .Scale({-0.044, 0.342, 0.021});};
    AnyRefNode InterTransverseLmid = {sRel = {.InterTransverseRmid.sRel[0], .InterTransverseRmid.sRel[1], .InterTransverseRmid.sRel[2]*-1};};
  };

 Main.HumanModel.BodyModel.Trunk.Segments.T7Seg = {

   // anterior longitudinal
    AnyRefNode ALLNodeInferior = {sRel = .Scale({0.002,0.302,0});};
    AnyRefNode ALLNodeSuperior = {sRel = .Scale({0.001,0.319,0});};
//    // posterior longitudinal
//    AnyRefNode PLLViaNode = {sRel = .Scale({0.037,0.015,0});};
//
    AnyRefNode PLLNodeSuperior = {sRel = .Scale( {-0.029, 0.320, 0});};
    AnyRefNode PLLNodeInferior = {sRel = .Scale({-0.028,0.302,0});};
//    // inter/supraspinous
    AnyRefNode InterspinousInferior = {sRel = .Scale({-0.055,0.285,0});};
    AnyRefNode InterspinousSuperior = {sRel = .Scale({-0.057,0.295,0});};
    AnyRefNode SupraspinousInferior = {sRel = .Scale({-0.064,0.276,0});};
    AnyRefNode SupraspinousSuperior = {sRel = .Scale({-0.067,0.283,0});};
//    // ligamenta flavia (right/left)
    AnyRefNode FlavumInferiorR = {sRel = .Scale({-0.038,0.298,0.0065});};
    AnyRefNode FlavumSuperiorR = {sRel = .Scale({-0.038,0.312,0.005});};
    AnyRefNode FlavumInferiorL = {sRel = {.FlavumInferiorR.sRel[0], .FlavumInferiorR.sRel[1], .FlavumInferiorR.sRel[2]*-1};};
    AnyRefNode FlavumSuperiorL = {sRel = {.FlavumSuperiorR.sRel[0], .FlavumSuperiorR.sRel[1], .FlavumSuperiorR.sRel[2]*-1};};

    AnyRefNode InterTransverseR = {sRel = .Scale({-0.054, 0.317, 0.030});};
    AnyRefNode InterTransverseL = {sRel = {.InterTransverseR.sRel[0], .InterTransverseR.sRel[1], .InterTransverseR.sRel[2]*-1};};

    AnyRefNode InterTransverseRmid = {sRel = .Scale({-0.043, 0.312, 0.021});};
    AnyRefNode InterTransverseLmid = {sRel = {.InterTransverseRmid.sRel[0], .InterTransverseRmid.sRel[1], .InterTransverseRmid.sRel[2]*-1};};
  };

 Main.HumanModel.BodyModel.Trunk.Segments.T8Seg = {

   // anterior longitudinal
    AnyRefNode ALLNodeInferior = {sRel = .Scale({0.005,0.276,0});};
    AnyRefNode ALLNodeSuperior = {sRel = .Scale({0.003,0.294,0});};

    //    // posterior longitudinal
//    AnyRefNode PLLViaNode = {sRel = .Scale({0.037+.dT8x,0.015+.dT8y,0});};
    AnyRefNode PLLNodeSuperior = {sRel = .Scale( {-0.029, 0.293, 0});};
    AnyRefNode PLLNodeInferior = {sRel = .Scale({-0.026,0.274,0});};

    // inter/supraspinous
    AnyRefNode InterspinousInferior = {sRel = .Scale({-0.049,0.259,0});};
    AnyRefNode InterspinousSuperior = {sRel = .Scale({-0.052,0.270,0});};
    AnyRefNode SupraspinousInferior = {sRel = .Scale({-0.058,0.253,0});};
    AnyRefNode SupraspinousSuperior = {sRel = .Scale({-0.060,0.261,0});};

    // ligamenta flavia (right/left)
    AnyRefNode FlavumInferiorR = {sRel = .Scale({-0.034,0.272,0.0065});};
    AnyRefNode FlavumSuperiorR = {sRel = .Scale({-0.038,0.283,0.005});};
    AnyRefNode FlavumInferiorL = {sRel = {.FlavumInferiorR.sRel[0], .FlavumInferiorR.sRel[1], .FlavumInferiorR.sRel[2]*-1};};
    AnyRefNode FlavumSuperiorL = {sRel = {.FlavumSuperiorR.sRel[0], .FlavumSuperiorR.sRel[1], .FlavumSuperiorR.sRel[2]*-1};};

    AnyRefNode InterTransverseR = {sRel = .Scale({-0.054, 0.288, 0.032});};
    AnyRefNode InterTransverseL = {sRel = {.InterTransverseR.sRel[0], .InterTransverseR.sRel[1], .InterTransverseR.sRel[2]*-1};};

    AnyRefNode InterTransverseRmid = {sRel = .Scale({-0.043, 0.285, 0.021});};
    AnyRefNode InterTransverseLmid = {sRel = {.InterTransverseRmid.sRel[0], .InterTransverseRmid.sRel[1], .InterTransverseRmid.sRel[2]*-1};};
  };

  Main.HumanModel.BodyModel.Trunk.Segments.T9Seg = {

   // anterior longitudinal
    AnyRefNode ALLNodeInferior = {sRel = .Scale({0.010,0.252,0});};
    AnyRefNode ALLNodeSuperior = {sRel = .Scale({0.007,0.270,0});};
//    // posterior longitudinal
//    AnyRefNode PLLViaNode = {sRel = .Scale({0.037,0.015,0});};
//
    AnyRefNode PLLNodeSuperior = {sRel = .Scale( {-0.0255, 0.268, 0});};
    AnyRefNode PLLNodeInferior = {sRel = .Scale({-0.022,0.245,0});};
//    // inter/supraspinous
    AnyRefNode InterspinousInferior = {sRel = .Scale({-0.046,0.235,0});};
    AnyRefNode InterspinousSuperior = {sRel = .Scale({-0.047,0.248,0});};
    AnyRefNode SupraspinousInferior = {sRel = .Scale({-0.054,0.228,0});};
    AnyRefNode SupraspinousSuperior = {sRel = .Scale({-0.056,0.236,0});};
//    // ligamenta flavia (right/left)
    AnyRefNode FlavumInferiorR = {sRel = .Scale({-0.031,0.242,0.0065});};
    AnyRefNode FlavumSuperiorR = {sRel = .Scale({-0.034,0.258,0.005});};
    AnyRefNode FlavumInferiorL = {sRel = {.FlavumInferiorR.sRel[0], .FlavumInferiorR.sRel[1], .FlavumInferiorR.sRel[2]*-1};};
    AnyRefNode FlavumSuperiorL = {sRel = {.FlavumSuperiorR.sRel[0], .FlavumSuperiorR.sRel[1], .FlavumSuperiorR.sRel[2]*-1};};

    AnyRefNode InterTransverseR = {sRel = .Scale({-0.049, 0.266, 0.027});};
    AnyRefNode InterTransverseL = {sRel = {.InterTransverseR.sRel[0], .InterTransverseR.sRel[1], .InterTransverseR.sRel[2]*-1};};

    AnyRefNode InterTransverseRmid = {sRel = .Scale({-0.038, 0.262, 0.021});};
    AnyRefNode InterTransverseLmid = {sRel = {.InterTransverseRmid.sRel[0], .InterTransverseRmid.sRel[1], .InterTransverseRmid.sRel[2]*-1};};
  };

 Main.HumanModel.BodyModel.Trunk.Segments.T10Seg = {

   // anterior longitudinal
    AnyRefNode ALLNodeInferior = {sRel = .Scale({0.017,0.224,0});};
    AnyRefNode ALLNodeSuperior = {sRel = .Scale({0.0115,0.245,0});};
//    // posterior longitudinal
//    AnyRefNode PLLViaNode = {sRel = .Scale({0.037+.dT10x,0.015+.dT10y,0});};
//
    AnyRefNode PLLNodeSuperior = {sRel = .Scale( {-0.020, 0.238, 0});};
    AnyRefNode PLLNodeInferior = {sRel = .Scale({-0.013,0.213,0});};
//    // inter/supraspinous
    AnyRefNode InterspinousInferior = {sRel = .Scale({-0.036,0.197,0});};
    AnyRefNode InterspinousSuperior = {sRel = .Scale({-0.040,0.208,0});};
    AnyRefNode SupraspinousInferior = {sRel = .Scale({-0.044,0.188,0});};
    AnyRefNode SupraspinousSuperior = {sRel = .Scale({-0.045,0.196,0});};
//    // ligamenta flavia (right/left)
    AnyRefNode FlavumInferiorR = {sRel = .Scale({-0.022,0.210,0.0065});};
    AnyRefNode FlavumSuperiorR = {sRel = .Scale({-0.026,0.228,0.005});};
    AnyRefNode FlavumInferiorL = {sRel = {.FlavumInferiorR.sRel[0], .FlavumInferiorR.sRel[1], .FlavumInferiorR.sRel[2]*-1};};
    AnyRefNode FlavumSuperiorL = {sRel = {.FlavumSuperiorR.sRel[0], .FlavumSuperiorR.sRel[1], .FlavumSuperiorR.sRel[2]*-1};};
//
    AnyRefNode InterTransverseR = {sRel = .Scale({-0.031, 0.230, 0.025});};
    AnyRefNode InterTransverseL = {sRel = {.InterTransverseR.sRel[0], .InterTransverseR.sRel[1], .InterTransverseR.sRel[2]*-1};};

    AnyRefNode InterTransverseRmid = {sRel = .Scale({-0.019, 0.223, 0.021});};
    AnyRefNode InterTransverseLmid = {sRel = {.InterTransverseRmid.sRel[0], .InterTransverseRmid.sRel[1], .InterTransverseRmid.sRel[2]*-1};};
  };


Main.HumanModel.BodyModel.Trunk.Segments.T11Seg = {

   // anterior longitudinal
    AnyRefNode ALLNodeInferior = {sRel = .Scale({0.0275,0.195,0});};
    AnyRefNode ALLNodeSuperior = {sRel = .Scale({0.019,0.217,0});};
//    // posterior longitudinal
//    AnyRefNode PLLViaNode = {sRel = .Scale({0.037+.dT11x,0.015+.dT11y,0});};

    AnyRefNode PLLNodeSuperior = {sRel = .Scale( {-0.011, 0.207, 0});};
    AnyRefNode PLLNodeInferior = {sRel = .Scale({-0.003,0.182,0});};
//    // inter/supraspinous
    AnyRefNode InterspinousInferior = {sRel = .Scale({-0.028,0.163,0});};
    AnyRefNode InterspinousSuperior = {sRel = .Scale({-0.032,0.178,0});};
    AnyRefNode SupraspinousInferior = {sRel = .Scale({-0.037,0.158,0});};
    AnyRefNode SupraspinousSuperior = {sRel = .Scale({-0.039,0.166,0});};
//    // ligamenta flavia (right/left)
    AnyRefNode FlavumInferiorR = {sRel = .Scale({-0.012,0.180,0.0065});};
    AnyRefNode FlavumSuperiorR = {sRel = .Scale({-0.020,0.196,0.005});};
    AnyRefNode FlavumInferiorL = {sRel = {.FlavumInferiorR.sRel[0], .FlavumInferiorR.sRel[1], .FlavumInferiorR.sRel[2]*-1};};
    AnyRefNode FlavumSuperiorL = {sRel = {.FlavumSuperiorR.sRel[0], .FlavumSuperiorR.sRel[1], .FlavumSuperiorR.sRel[2]*-1};};

    AnyRefNode InterTransverseR = {sRel = .Scale({-0.022, 0.198, 0.025});};
    AnyRefNode InterTransverseL = {sRel = {.InterTransverseR.sRel[0], .InterTransverseR.sRel[1], .InterTransverseR.sRel[2]*-1};};

    AnyRefNode InterTransverseRmid = {sRel = .Scale({-0.013, 0.191, 0.021});};
    AnyRefNode InterTransverseLmid = {sRel = {.InterTransverseRmid.sRel[0], .InterTransverseRmid.sRel[1], .InterTransverseRmid.sRel[2]*-1};};
  };
