AnyVar Angle_T1 =  17.7114931495;
AnyVar Angle_T2 =  17.4944785185;
AnyVar Angle_T3 =  14.7186488739;
AnyVar Angle_T4 =   8.9024229208;
AnyVar Angle_T5 =   4.9155854755;
AnyVar Angle_T6 =   0.3055622888;
AnyVar Angle_T7 =  -4.0466026333;
AnyVar Angle_T8 =  -3.6574934696;
AnyVar Angle_T9 =  -7.8345453542;
AnyVar Angle_T10 = -12.0345503679;
AnyVar Angle_T11 = -14.3493320429;
AnyVar Angle_T12 = -18.5278435551;
AnyVar Angle_L1 = -15.2447089496;
AnyVar Angle_L2 =  -6.5379089446;
AnyVar Angle_L3 =   2.6573564582;
AnyVar Angle_L4 =  13.8251542171;
AnyVar Angle_L5 =  26.3104409477;
AnyVar T1_x =   0.0069004378;
AnyVar T1_y =   0.4538771639;
AnyVar T2_x =   0.0014836327;
AnyVar T2_y =   0.4326639147;
AnyVar T3_x =  -0.0048349807;
AnyVar T3_y =   0.4109878986;
AnyVar T4_x =  -0.0092563165;
AnyVar T4_y =   0.3905045824;
AnyVar T5_x =  -0.0112265169;
AnyVar T5_y =   0.3700014625;
AnyVar T6_x =  -0.0106823919;
AnyVar T6_y =   0.3478624210;
AnyVar T7_x =  -0.0080664795;
AnyVar T7_y =   0.3263469253;
AnyVar T8_x =  -0.0049945097;
AnyVar T8_y =   0.3042638619;
AnyVar T9_x =  -0.0015665412;
AnyVar T9_y =   0.2766252385;
AnyVar T10_x =   0.0039374943;
AnyVar T10_y =   0.2456814636;
AnyVar T11_x =   0.0119212088;
AnyVar T11_y =   0.2146066766;
AnyVar T12_x =   0.0217075401;
AnyVar T12_y =   0.1847017487;
AnyVar L1_x =   0.0311459269;
AnyVar L1_y =   0.1559641765;
AnyVar L2_x =   0.0372793771;
AnyVar L2_y =   0.1252937004;
AnyVar L3_x =   0.0408870762;
AnyVar L3_y =   0.0910062042;
AnyVar L4_x =   0.0371402384;
AnyVar L4_y =   0.0517275097;
AnyVar L5_x =   0.0242301049;
AnyVar L5_y =   0.0136679999;
AnyVar S1_post_x =   0.0000000000;
AnyVar S1_post_y =   0.0000000000;
AnyVar S1_ant_x =   0.0242570571;
AnyVar S1_ant_y =  -0.0210930931;
AnyVar FH_x =   0.0325888288;
AnyVar FH_y =  -0.1192462863;
AnyVar PI = 51.6690;
AnyVar SS = 41.0091;
AnyFloat BH =  1.7000;
AnyFloat BM = 60.0000;
AnyFloat LL = -57.9987;
AnyFloat T1GT = -3.2858;
AnyFloat L4S1L = -30.2582;
AnyFloat T5_T12_Kifoz = 23.6552;
AnyFloat T10_L2_Kifoz = -5.7922;
AnyFloat T2_T5_Kifoz = 15.3875;


AnyVar CorAngle_T1 =   7.1476880451;
AnyVar CorAngle_T2 =   1.8258715556;
AnyVar CorAngle_T3 =  -9.0946570900;
AnyVar CorAngle_T4 = -27.7471979411;
AnyVar CorAngle_T5 = -34.8075838049;
AnyVar CorAngle_T6 = -30.8901940894;
AnyVar CorAngle_T7 = -27.8873385153;
AnyVar CorAngle_T8 = -20.0766232312;
AnyVar CorAngle_T9 =  -6.7172754297;
AnyVar CorAngle_T10 =  11.5753936704;
AnyVar CorAngle_T11 =  24.4295877519;
AnyVar CorAngle_T12 =  30.2084826005;
AnyVar CorAngle_L1 =  22.3476825465;
AnyVar CorAngle_L2 =  10.9023976594;
AnyVar CorAngle_L3 =  -1.9036737505;
AnyVar CorAngle_L4 = -13.2143841996;
AnyVar CorAngle_L5 =  -8.5809057806;
AnyVar T1_z =   0.0188157220;
AnyVar T1_y_cor =   0.4243806021;
AnyVar T2_z =   0.0205835302;
AnyVar T2_y_cor =   0.4039784222;
AnyVar T3_z =   0.0199686622;
AnyVar T3_y_cor =   0.3839258872;
AnyVar T4_z =   0.0135712809;
AnyVar T4_y_cor =   0.3647406760;
AnyVar T5_z =   0.0012975948;
AnyVar T5_y_cor =   0.3461612310;
AnyVar T6_z =  -0.0111644773;
AnyVar T6_y_cor =   0.3274191679;
AnyVar T7_z =  -0.0230916278;
AnyVar T7_y_cor =   0.3064648375;
AnyVar T8_z =  -0.0343588473;
AnyVar T8_y_cor =   0.2821953115;
AnyVar T9_z =  -0.0410187266;
AnyVar T9_y_cor =   0.2575432065;
AnyVar T10_z =  -0.0397743700;
AnyVar T10_y_cor =   0.2313636682;
AnyVar T11_z =  -0.0307937289;
AnyVar T11_y_cor =   0.2044036236;
AnyVar T12_z =  -0.0164682519;
AnyVar T12_y_cor =   0.1786246209;
AnyVar L1_z =  -0.0010921240;
AnyVar L1_y_cor =   0.1485985075;
AnyVar L2_z =   0.0100477797;
AnyVar L2_y_cor =   0.1127825842;
AnyVar L3_z =   0.0133546559;
AnyVar L3_y_cor =   0.0779515946;
AnyVar L4_z =   0.0080650488;
AnyVar L4_y_cor =   0.0454520612;
AnyVar L5_z =   0.0019235278;
AnyVar L5_y_cor =   0.0163258899;
AnyVar S1_right_z =  -0.0182150490;
AnyVar S1_right_y_cor =   0.0024545025;
AnyVar S1_left_z =   0.0182150490;
AnyVar S1_left_y_cor =  -0.0024545025;
AnyVar FH1_z =  -0.0949596096;
AnyVar FH1_y_cor =  -0.0970111099;
AnyVar FH2_z =   0.0790092333;
AnyVar FH2_y_cor =  -0.0911547455;
AnyVar SacrObl = -7.6745;
AnyVar PelvicObl = -7.6745;

AnyVar MTCobb = 63.9506;
